*Heading
** Job name: 2domain6mm Model name: Model-1
** Generated by: Abaqus/CAE 6.10-1
*Preprint, echo=NO, model=NO, history=NO, contact=NO
**
** PARTS
**
*Part, name=Part-1
*Node
      1,   1.00176001,          33.
      2,   1.00176001,           0.
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*Element, type=CPS4R
  1,    1,    7,  323,  220
  2,    7,    8,  324,  323
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*Nset, nset=a_chanbot
   2,   6, 321, 322
*Elset, elset=a_chanbot, generate
  991,  1189,    99
*Nset, nset=b_polybot
   2,   3, 105, 106, 107, 108, 109, 110, 111, 112, 113
*Elset, elset=b_polybot, generate
  99,  990,   99
*Nset, nset=c_chantop
   1,   5, 221, 222
*Elset, elset=c_chantop, generate
 1089,  1287,    99
*Nset, nset=d_polytop
   1,   4, 212, 213, 214, 215, 216, 217, 218, 219, 220
*Elset, elset=d_polytop, generate
   1,  892,   99
*Nset, nset=e_mat1
    1,    2,    5,    6,    7,    8
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*Elset, elset=e_mat1, generate
991, 992, 993, 994, 995, 996, 997, 998, 999, 1000,
1001, 1002, 1003, 1004, 1005, 1006, 1007, 1008, 1009, 1010,
1011, 1012, 1013, 1014, 1015, 1016, 1017, 1018, 1019, 1020,
1021, 1022, 1023, 1024, 1025, 1026, 1027, 1028, 1029, 1030,
1031, 1032, 1033, 1034, 1035, 1036, 1037, 1038, 1039, 1040,
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1281, 1282, 1283, 1284, 1285, 1286, 1287
*Nset, nset=f_mat2
    1,    2,    3,    4,    7,    8
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*Elset, elset=f_mat2, generate
  1, 2, 3, 4, 5, 6, 7, 8, 9, 10,
11, 12, 13, 14, 15, 16, 17, 18, 19, 20,
21, 22, 23, 24, 25, 26, 27, 28, 29, 30,
31, 32, 33, 34, 35, 36, 37, 38, 39, 40,
41, 42, 43, 44, 45, 46, 47, 48, 49, 50,
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981, 982, 983, 984, 985, 986, 987, 988, 989, 990
*End Part
**
**
** ASSEMBLY
**
*Assembly, name=Assembly
**
*Instance, name=partinstance, part=Part-1
*End Instance
**
*End Assembly
**
** MATERIALS
**
*Material, name=Material-1
*Material, name=Material-2
